CL-415 UAV 2.51 m span (cl415_description)
0.0
0 0 0.0
0.69804 0.2780 2.5100
0.07545 0.0 -0.10066
0.0
#
SURFACE
Wing
12 1.0 30 1.0
COMPONENT
1
YDUPLICATE
0.0
ANGLE
0.0
SECTION
0.00000 0.00000 0.00000 0.27800 2.6500
NACA
4417
CLAF
0.9604
SECTION
0.00000 0.79300 0.00000 0.27800 2.6500
NACA
4417
CLAF
0.9604
#
SURFACE
Wing_ail
12 1.0 16 1.0
COMPONENT
1
YDUPLICATE
0.0
ANGLE
0.0
SECTION
0.00000 0.79300 0.00000 0.27800 2.6500
NACA
4417
CLAF
0.9604
CONTROL
aileron -1.000 0.75000 0. 0. 0. -1.0
SECTION
0.00000 1.19500 0.00000 0.27800 2.6500
NACA
4417
CLAF
0.9604
CONTROL
aileron -1.000 0.75000 0. 0. 0. -1.0
#
SURFACE
Wing_tip
12 1.0 3 1.0
COMPONENT
1
YDUPLICATE
0.0
ANGLE
0.0
SECTION
0.00000 1.19500 0.00000 0.27800 2.6500
NACA
4417
CLAF
0.9604
SECTION
0.00000 1.25500 0.00000 0.27800 2.6500
NACA
4417
CLAF
0.9604
#
#
SURFACE
Hstab_root
10 1.0 2 1.0
COMPONENT
2
YDUPLICATE
0.0
ANGLE
0.0
SECTION
0.81300 0.00000 0.12700 0.23900 0.0000
NACA
0016
CLAF
0.9560
SECTION
0.81300 0.02031 0.12700 0.23900 0.0000
NACA
0016
CLAF
0.9560
#
SURFACE
Hstab
10 1.0 18 1.0
COMPONENT
2
YDUPLICATE
0.0
ANGLE
0.0
SECTION
0.81300 0.02031 0.12700 0.23900 0.0000
NACA
0016
CLAF
0.9560
CONTROL
elevator 1.000 0.60251 0. 0. 0. 1.0
SECTION
0.81300 0.46800 0.12700 0.23900 0.0000
NACA
0016
CLAF
0.9560
CONTROL
elevator 1.000 0.60251 0. 0. 0. 1.0
#
#
SURFACE
Fin
10 1.0 16 1.0
COMPONENT
3
ANGLE
0.0
SECTION
0.66800 0.00000 -0.01730 0.41900 0.0000
NACA
0012
CLAF
1.0000
CONTROL
rudder -1.000 0.68735 0. 0. 0. 1.0
SECTION
0.97000 0.00000 0.41700 0.16300 0.0000
NACA
0012
CLAF
1.0000
CONTROL
rudder -1.000 0.55215 0. 0. 0. 1.0
#
SURFACE
Finlet
6 1.0 10 1.0
COMPONENT
4
YDUPLICATE
0.0
ANGLE
0.0
SECTION
0.88900 0.18300 0.01000 0.05054 0.0000
NACA
0012
CLAF
1.0000
SECTION
0.77750 0.18300 0.12800 0.16204 0.0000
NACA
0012
CLAF
1.0000
SECTION
0.88900 0.18300 0.23600 0.05054 0.0000
NACA
0012
CLAF
1.0000
#
BODY
Hull
40 1.0
TRANSLATE
0.0 0.0 0.0
BFILE
hull.dat
#
BODY
Nacelle
20 1.0
YDUPLICATE
0.0
TRANSLATE
0.0 0.29730 0.0
BFILE
nacelle.dat
#
